f(x, y) := x^3*y + x*y^3
i := 1, 2 .. 10
f(i, i) = [2; 32; 162; 512; 1250; 2592; 4802; 8192; 13122; 20000]
f(x, y) == a solve, x, y → [
    ((-(3*sqrt(3)*1i) + 3)*(sqrt(3)*sqrt(27*a^2 + 4) + 9*a)^(2/3) + 2*18^(2/3))/((3*sqrt(3)*1i + 3)*18^(1/3)*(sqrt(3)*sqrt(27*a^2 + 4) + 9*a)^(1/3)), 0;
    ((-(3*sqrt(3)*1i) - 3)*(sqrt(3)*sqrt(27*a^2 + 4) + 9*a)^(2/3) - 2*18^(2/3))/((3*sqrt(3)*1i - 3)*18^(1/3)*(sqrt(3)*sqrt(27*a^2 + 4) + 9*a)^(1/3)), 0;
    (3*(sqrt(3)*sqrt(27*a^2 + 4) + 9*a)^(2/3) - 18^(2/3))/(3*18^(1/3)*(sqrt(3)*sqrt(27*a^2 + 4) + 9*a)^(1/3)), 0
]
# [3D plot: x^3*y + x*y^3]
f((3*(sqrt(3)*sqrt(27*a^2 + 4) + 9*a)^(2/3) - 18^(2/3))/(3*18^(1/3)*(sqrt(3)*sqrt(27*a^2 + 4) + 9*a)^(1/3)), (3*(sqrt(3)*sqrt(27*a^2 + 4) + 9*a)^(2/3) - 18^(2/3))/(3*18^(1/3)*(sqrt(3)*sqrt(27*a^2 + 4) + 9*a)^(1/3))) → 18^(2/3)*(3*(sqrt(3)*sqrt(27*a^2 + 4) + 9*a)^(2/3) - 18^(2/3))^4/(13122*(sqrt(3)*sqrt(27*a^2 + 4) + 9*a)^(4/3))
f(x, y) := x^3*y + x*y^3
k == x*y*(x^2 + y^2)
x*(x^2 + y^2) == k/y
x^3 + x*y^2 == k/y
x^3*y + x*y^3 == a solve, y → [
    (3*((x*sqrt((12*x^8 + 81*a^2)/x^2) + 9*a)/(18*x))^(2/3) - x^2)/(3*((x*sqrt((12*x^8 + 81*a^2)/x^2) + 9*a)/(18*x))^(1/3));
    ((-(3*sqrt(3)*1i) - 3)*((x*sqrt((12*x^8 + 81*a^2)/x^2) + 9*a)/(18*x))^(2/3) - 2*x^2)/((3*sqrt(3)*1i - 3)*((x*sqrt((12*x^8 + 81*a^2)/x^2) + 9*a)/(18*x))^(1/3));
    ((-(3*sqrt(3)*1i) + 3)*((x*sqrt((12*x^8 + 81*a^2)/x^2) + 9*a)/(18*x))^(2/3) + 2*x^2)/((3*sqrt(3)*1i + 3)*((x*sqrt((12*x^8 + 81*a^2)/x^2) + 9*a)/(18*x))^(1/3))
]
revY(x, a) := (3*((x*sqrt((12*x^8 + 81*a^2)/x^2) + 9*a)/(18*x))^(2/3) - x^2)/(3*((x*sqrt((12*x^8 + 81*a^2)/x^2) + 9*a)/(18*x))^(1/3))
# [plot: revY(x, 100000) vs x]
d/dx(revY(x, 100000)) → ((-(450000*x*sqrt(x^6 + 67500000000/x^2)) + (3*sqrt(3)*x^8 - 67500000000*sqrt(3)))*(sqrt(3)*sqrt(1/x^2)*sqrt(x^8 + 67500000000)/9 + 50000/x)^(2/3) - (1050000*x^3*sqrt(x^6 + 67500000000/x^2) + sqrt(3)*x^10 + 157500000000*sqrt(3)*x^2))/((1350000*x^2*sqrt(x^6 + 67500000000/x^2) + 3*sqrt(3)*x^9 + 202500000000*sqrt(3)*x)*(sqrt(3)*sqrt(x^6 + 67500000000/x^2)/9 + 50000/x)^(1/3))
aaa(x) := ((-(450000*x*sqrt(x^6 + 67500000000/x^2)) + (3*sqrt(3)*x^8 - 67500000000*sqrt(3)))*(sqrt(3)*sqrt(1/x^2)*sqrt(x^8 + 67500000000)/9 + 50000/x)^(2/3) - (1050000*x^3*sqrt(x^6 + 67500000000/x^2) + sqrt(3)*x^10 + 157500000000*sqrt(3)*x^2))/((1350000*x^2*sqrt(x^6 + 67500000000/x^2) + 3*sqrt(3)*x^9 + 202500000000*sqrt(3)*x)*(sqrt(3)*sqrt(x^6 + 67500000000/x^2)/9 + 50000/x)^(1/3))
# [plot: aaa(x) vs x]
d/dx(aaa(x)) → (((600000*x^21 + 94500000000000000*x^13 - 8505000000000000000000000000*x^5)*sqrt(x^12 + 135000000000*x^4 + 4556250000000000000000/x^4) + (230000000000*sqrt(3)*x^20 + 4725000000000000000000*sqrt(3)*x^12 - 1275750000000000000000000000000000*sqrt(3)*x^4)*sqrt(x^6 + 67500000000/x^2))*(sqrt(3)*sqrt(x^6 + 67500000000/x^2)/9 + 50000/x)^(1/3) + (50000000000*x^18 + 33075000000000000000000*x^10 + 182250000000000000000000000000000*x^2)*sqrt(x^12 + 135000000000*x^4 + 4556250000000000000000/x^4) + (200000*sqrt(3)*x^25 + 127500000000000000*sqrt(3)*x^17 + 9720000000000000000000000000*sqrt(3)*x^9 + 54675000000000000000000000000000000000*sqrt(3)*x)*sqrt(x^6 + 67500000000/x^2) + 350000000000*x^24 + 52650000000000000000000*x^16 + 2141437500000000000000000000000000*x^8 + 12301875000000000000000000000000000000000000)/(((1350000*x^21 + 212625000000000000*x^13 + 8201250000000000000000000000*x^5)*sqrt(x^12 + 135000000000*x^4 + 4556250000000000000000/x^4) + (sqrt(3)*x^28 + 405000000000*sqrt(3)*x^20 + 41006250000000000000000*sqrt(3)*x^12 + 1230187500000000000000000000000000*sqrt(3)*x^4)*sqrt(x^6 + 67500000000/x^2))*(sqrt(3)*sqrt(x^6 + 67500000000/x^2)/9 + 50000/x)^(2/3))
ggg(x) := d/dx(aaa(x))
# [plot: ggg(x) vs x]
(3*((x*sqrt((12*x^8 + 81*a^2)/x^2) + 9*a)/(18*x))^(2/3) - x^2)/(3*((x*sqrt((12*x^8 + 81*a^2)/x^2) + 9*a)/(18*x))^(1/3)) == x
(3*((sqrt(12*x^8 + 81*a^2) + 9*a)/(18*x))^(2/3) - x^2)/(3*((sqrt(12*x^8 + 81*a^2) + 9*a)/(18*x))^(1/3)) == x solve, x →  # error: Решение не было найдено.
aOut := rOut0 - (rIn0 + aIn)/p1
aIn := rIn0*aOut*fee100/(feeR*(rOut0 - aOut)) + 1
aIn → fee100*p1*rIn0*(-(rIn0 + aIn)/p1 + rOut0)/(feeR*(rIn0 + aIn)) + 1
clear(aOut, aIn)
aOut := rOut0 - (rIn0 + aIn)/p1
[aIn == fee100*p1*rIn0*(-(rIn0 + aIn)/p1 + rOut0)/(feeR*(rIn0 + aIn)) + 1] solve, aIn → [
    (sqrt(4*fee100*feeR*p1*rIn0*rOut0 + (feeR^2 - 2*fee100*feeR + fee100^2)*rIn0^2 + (2*feeR^2 - 2*fee100*feeR)*rIn0 + feeR^2) + (feeR - (feeR + fee100)*rIn0))/(2*feeR);
    (-sqrt(4*fee100*feeR*p1*rIn0*rOut0 + (feeR^2 - 2*fee100*feeR + fee100^2)*rIn0^2 + (2*feeR^2 - 2*fee100*feeR)*rIn0 + feeR^2) + (feeR - (feeR + fee100)*rIn0))/(2*feeR)
]
(sqrt(4*fee100*feeR*p1*rIn0*rOut0 + (feeR^2 - 2*fee100*feeR + fee100^2)*rIn0^2 + (2*feeR^2 - 2*fee100*feeR)*rIn0 + feeR^2) + (feeR - (feeR + fee100)*rIn0))/(2*feeR)
a := 4*fee100*feeR
b := feeR^2 - 2*fee100*feeR + fee100^2
c := -2*feeR^2 + 2*fee100*feeR
d := feeR^2
e := feeR + fee100
b simplify → (feeR - fee100)^2
c simplify → -(2*feeR*(feeR - fee100))
(sqrt(a*p1*rIn0*rOut0 + b*rIn0^2 - c*rIn0 + d) + (feeR - e*rIn0))/(2*feeR)
feeR := 2000 - 1
fee100 := 2000
a := 4*fee100*feeR
b := feeR^2 - 2*fee100*feeR + fee100^2
c := -2*feeR^2 + 2*fee100*feeR
d := feeR^2
e := feeR + fee100
b simplify → 1
c simplify → 3998
rIn0 := 10236052596665713530346
rOut0 := 14997500000
p1 := 1000000000000000000000000/651401299478
(sqrt(a*p1*rIn0*rOut0 + b*rIn0^2 - c*rIn0 + d) + (feeR - e*rIn0))/(2*feeR) = 5.11675e21
