rIn1 := rIn0 + aIn - aIn*(fee100 - feeR)/(2*fee100)
rIn1 simplify → rIn0 + aIn*feeR/(2*fee100) + aIn/2
rIn1 := rIn0 + aIn*feeR/(2*fee100) + aIn/2
rOut1 := rIn1/p1
aOut := rOut0 - rOut1
aIn := rIn0*aOut*fee100/(feeR*(rOut0 - aOut)) + 1
aIn simplify → -aIn*fee100*p1*rOut0*(feeR + fee100)/(feeR*(2*fee100*rIn0 + aIn*feeR + aIn*fee100)) + (fee100*p1*rOut0 + (feeR - fee100*rIn0))/feeR
aIn → fee100*p1*rIn0*(-(aIn*feeR/(2*fee100) + aIn/2 + rIn0)/p1 + rOut0)/(feeR*(aIn*feeR/(2*fee100) + aIn/2 + rIn0)) + 1
clear(aOut, aIn)
[aIn == fee100*p1*rIn0*(-(aIn*feeR/(2*fee100) + aIn/2 + rIn0)/p1 + rOut0)/(feeR*(aIn*feeR/(2*fee100) + aIn/2 + rIn0)) + 1] solve, aIn → [
    (sqrt((8*fee100^2*feeR^2 + 8*fee100^3*feeR)*p1*rIn0*rOut0 + (fee100^2*feeR^2 - 2*fee100^3*feeR + fee100^4)*rIn0^2 + (2*fee100*feeR^3 - 2*fee100^3*feeR)*rIn0 + feeR^4 + 2*fee100*feeR^3 + fee100^2*feeR^2) + (feeR^2 + fee100*feeR - (3*fee100*feeR + fee100^2)*rIn0))/(2*feeR^2 + 2*fee100*feeR);
    (-sqrt((8*fee100^2*feeR^2 + 8*fee100^3*feeR)*p1*rIn0*rOut0 + (fee100^2*feeR^2 - 2*fee100^3*feeR + fee100^4)*rIn0^2 + (2*fee100*feeR^3 - 2*fee100^3*feeR)*rIn0 + feeR^4 + 2*fee100*feeR^3 + fee100^2*feeR^2) + (feeR^2 + fee100*feeR - (3*fee100*feeR + fee100^2)*rIn0))/(2*feeR^2 + 2*fee100*feeR)
]
(sqrt((8*fee100^2*feeR^2 + 8*fee100^3*feeR)*p1*rIn0*rOut0 + (fee100^2*feeR^2 - 2*fee100^3*feeR + fee100^4)*rIn0^2 + (2*fee100*feeR^3 - 2*fee100^3*feeR)*rIn0 + feeR^4 + 2*fee100*feeR^3 + fee100^2*feeR^2) + (feeR^2 + fee100*feeR - (3*fee100*feeR + fee100^2)*rIn0))/(2*feeR^2 + 2*fee100*feeR)
a := 8*fee100^2*feeR^2 + 8*fee100^3*feeR
b := fee100^2*feeR^2 - 2*fee100^3*feeR + fee100^4
c := 2*fee100^3*feeR - 2*fee100*feeR^3
d := feeR^4 + 2*fee100*feeR^3 + fee100^2*feeR^2
e := 3*fee100*feeR + fee100^2
f := feeR^2 + fee100*feeR
(sqrt((8*fee100^2*feeR^2 + 8*fee100^3*feeR)*p1*rIn0*rOut0 + (fee100^2*feeR^2 - 2*fee100^3*feeR + fee100^4)*rIn0^2 + (2*fee100*feeR^3 - 2*fee100^3*feeR)*rIn0 + feeR^4 + 2*fee100*feeR^3 + fee100^2*feeR^2) + (feeR^2 + fee100*feeR - (3*fee100*feeR + fee100^2)*rIn0))/(2*feeR^2 + 2*fee100*feeR) simplify → (sqrt((8*fee100^2*feeR^2 + 8*fee100^3*feeR)*p1*rIn0*rOut0 + (fee100^2*feeR^2 - 2*fee100^3*feeR + fee100^4)*rIn0^2 + (2*fee100*feeR^3 - 2*fee100^3*feeR)*rIn0 + feeR^4 + 2*fee100*feeR^3 + fee100^2*feeR^2) - (3*fee100*feeR + fee100^2)*rIn0)/(2*feeR*(feeR + fee100)) + 1/2
(sqrt(a*p1*rIn0*rOut0 + b*rIn0^2 - c*rIn0 + d) + (f - e*rIn0))/(2*f) simplify → (sqrt((8*fee100^2*feeR^2 + 8*fee100^3*feeR)*p1*rIn0*rOut0 + (fee100^2*feeR^2 - 2*fee100^3*feeR + fee100^4)*rIn0^2 + (2*fee100*feeR^3 - 2*fee100^3*feeR)*rIn0 + feeR^4 + 2*fee100*feeR^3 + fee100^2*feeR^2) - (3*fee100*feeR + fee100^2)*rIn0)/(2*feeR*(feeR + fee100)) + 1/2
a simplify → 8*fee100^2*feeR*(feeR + fee100)
b simplify → fee100^2*(feeR - fee100)^2
c simplify → -(2*fee100*feeR*(feeR - fee100)*(feeR + fee100))
d simplify → feeR^2*(feeR + fee100)^2
e simplify → fee100*(3*feeR + fee100)
f simplify → feeR*(feeR + fee100)
(sqrt((8*fee100^2*feeR^2 + 8*fee100^3*feeR)*p1*rIn0*rOut0 + (fee100^2*feeR^2 - 2*fee100^3*feeR + fee100^4)*rIn0^2 + (2*fee100*feeR^3 - 2*fee100^3*feeR)*rIn0 + feeR^4 + 2*fee100*feeR^3 + fee100^2*feeR^2) + (feeR^2 + fee100*feeR - (3*fee100*feeR + fee100^2)*rIn0))/(2*feeR^2 + 2*fee100*feeR) =  # error: Эта переменная не определена. Проверьте правильность установки обозначения.
rIn0 := 990108813
rOut0 := 1009995000
fee100 := 10000
feeR := fee100 - 10
p1 := 1
