aOut := rOut0 - (rIn0 + aIn)/p1  # error: Эта переменная не определена. Проверьте правильность установки обозначения.
aIn := rIn0*aOut*1000/(997*(rOut0 - aOut)) + 1  # error: Эта переменная не определена. Проверьте правильность установки обозначения.
aIn → 1000*p1*rIn0*(-(rIn0 + aIn)/p1 + rOut0)/(997*rIn0 + 997*aIn) + 1
clear(aOut, aIn)
aOut := rOut0 - (rIn0 + aIn)/p1  # error: Эта переменная не определена. Проверьте правильность установки обозначения.
[aIn == rIn0*aOut*1000/(997*(rOut0 - aOut)) + 1] solve, aIn → [
    (sqrt(3988000*p1*rIn0*rOut0 + 9*rIn0^2 - 5982*rIn0 + 994009) + (997 - 1997*rIn0))/1994;
    (-sqrt(3988000*p1*rIn0*rOut0 + 9*rIn0^2 - 5982*rIn0 + 994009) + (997 - 1997*rIn0))/1994
]
